<Lems>

  <!-- Simple cell with Sodium, Potassium and Calcium channels and
       an exponentially decaying Calcium pool. The Calcium current due to the
       channels is calculated using the GHK field equation -->

  <Target component="sim1"/>

  <Include file="Cells.xml"/>
  <Include file="Networks.xml"/>
  <Include file="Simulation.xml"/>

  <Include file="ghk_na_k_ca.nml"/>
  <Include file="channelDensityGHK2.xml"/>

  <!-- Simulation specifications -->
  <Simulation id="sim1" length="50ms" step="0.001ms" target="net1">

    <Display id="d1" title="Membrane Potential (mV)" timeScale="1ms" xmin="0" xmax="50" ymin="-80" ymax="40">
      <Line id="V" quantity="pop/0/na_k_ca/v" scale="1mV"  color="#ffffff" timeScale="1ms"/>
    </Display>

    <Display id="d2" title="Ca current density (uA_per_cm2)" timeScale="1ms" xmin="0" xmax="50" ymin="0" ymax="3">
      <Line id="Ca iDensity GHK" quantity="pop/0/na_k_ca/biophys/membraneProperties/ca_all/iDensity" scale="1uA_per_cm2"  color="#00ff00" timeScale="1ms"/>
      <Line id="Ca iDensity GHK2" quantity="pop/0/na_k_ca/biophys/membraneProperties/ca_all2/iDensity" scale="1uA_per_cm2"  color="#ffff00" timeScale="1ms"/>
    </Display>

    <Display id="d3" title="Internal Ca concentration (mM)" timeScale="1ms" xmin="0" xmax="50" ymin="0" ymax="45">
      <Line id="caConc" quantity="pop/0/na_k_ca/caConc" scale="1e-6 mM"  color="#ff0000" timeScale="1ms"/>
    </Display>

    <OutputFile id="of0" fileName="/tmp/lems_ghk.dat">
      <OutputColumn id="v" quantity="pop/0/na_k_ca/v"/>
      <OutputColumn id="ica" quantity="pop/0/na_k_ca/biophys/membraneProperties/ca_all/iDensity"/>
      <OutputColumn id="ca" quantity="pop/0/na_k_ca/caConc"/>
    </OutputFile>

  </Simulation>

</Lems>
