<?xml version="1.0" encoding="UTF-8"?>
<channelml xmlns="http://morphml.org/channelml/schema"
           xmlns:xsi="http://www.w3.org/2001/XMLSchema-instance"
           xmlns:meta="http://morphml.org/metadata/schema"
           xsi:schemaLocation="http://morphml.org/channelml/schema http://www.neuroml.org/NeuroMLValidator/NeuroMLFiles/Schemata/v1.8.1/Level2/ChannelML_v1.8.1.xsd"
           units="Physiological Units">

  <ion name="ca" charge="2" role="SignallingSubstance">
    <meta:notes>Signifies that the ion is involved in a process which alters its concentration</meta:notes>
  </ion>

  <ion_concentration name="ca_pool">

    <meta:notes>An expontially decaying pool of calcium</meta:notes>

    <ion_species name="ca"/>

    <!-- 3e-6 mM = 3e-12 mol/cm^3  and 1ms -->
    <decaying_pool_model resting_conc="3e-12" decay_constant="1">

      <fixed_pool_info>
	<!-- "9.54929658551e-3 mmolar_per_nA_per_ms" -->
	<!-- "9.54929658551e-6 mol/cm^3/uA/ms" -->
        <phi>9.54929658551e-6</phi>
      </fixed_pool_info>

    </decaying_pool_model>

  </ion_concentration>

</channelml>
